###############################################
# The purpose of this script is to initialize condtions
# for spring and dashpot forces for particles in a box.

# This creates a periodic boundry on sides and shrink wrapped
# on sides then compresses that until an energy minimum is found.

# Output is a "restart" file with the that can be used to
# for other simulations and a movie showing the compression.

# The following variables will need to be
# passed through the command line to run the code:

#./lmp -var fric 1 -var AMP 0 -var dimensionless_p 0.1 -in ./compress_srd.lammps

# All questions regarding this script send to colton.kawamura1@nps.edu
###############################################


###############################################
# ENVIRONMENT
###############################################
units 		si			# "Units" definition is meaningless, only dimensionless numbers matter
atom_style	sphere		# "shere" is used for granular models
boundary	p p s		#(x y z); p= periodic on sides, shrink-wrapped on sides
newton		on 		    # needs to be on for SRD;  "off" turns off newton's third law, for savings in computation. If two interacting atoms are on two processors, both processors compute interaction and resulting force but not communicated.
comm_modify	vel yes		# "vel yes" communicates velocity info with ghost (atoms that lie within the cuttoff distance of periodic boundary)
neighbor	0.3 bin 	# Size of "skin" for neighbor lists

###############################################
# VARIABLES
###############################################
variable	d_ave equal 1
variable	density equal 1
variable	PI equal 3.141592653589
variable	mass_particle equal ${density}*4/3*${PI}*(${d_ave}/2)^3
variable	e_n equal .10 #restiution coefficient
variable	kn equal 100
variable	meff equal ${mass_particle}^2/(2*${mass_particle}) #From J.Shafer, under equation 1
variable	t_n equal sqrt(${meff}/${kn}*(1/${PI}^2+(ln(${e_n}/${meff})^2)))
variable	gamma_n equal 10000
variable	xmu equal 0.01
variable	dampflag equal 1 #1 on, 0 off
variable    kt equal ${kn}*2/7
variable    gamma_t equal ${gamma_n}*0.5
variable	tcol equal 2*${PI}/sqrt(2*${kn}/${meff})
variable	dt equal ${tcol}*1e-5 # 1e-5
timestep 	${dt}
variable	time equal step*dt
# variable	dimensionless_p equal ${P}*${d_ave}/${kn}
variable	P equal ${dimensionless_p}*${kn}/${d_ave}
variable	pressure_phase1 equal 20

if "${fric} == 1" then &
	"variable friction_status string Friction_ON" &
else &
	"variable friction_status string Friction_OFF"

###############################################
# Read a data file of particle positions
###############################################
# read_data	./packings/input_small_flow.lammps
read_data	./packings/input_file.lammps

###############################################
# Set the interactions between particles
###############################################
# Spring law
if "${fric} == 1" then &
	"pair_style gran/hooke/history ${kn} ${kt} ${gamma_n} ${gamma_t} ${xmu} ${dampflag} limit_damping" &
else &
	"pair_style	gran/hooke/history ${kn} ${kt} ${gamma_n} ${gamma_t} 0 ${dampflag}"
pair_coeff	* *
# pair_coeff	4 0

# viscosity
fix 		apply_viscous all viscous 1

###############################################
# Create and Adjust Particles
###############################################
#  Lower wall particles
group		lower type 2
set			type 2 diameter 3 # changed to large because SRD particles slipping through. Wall is a nontrival option as it can't move outside of sinusoidal
variable	FREQ equal 3
variable	PER equal 1/${FREQ}
# fix 		wiggle_lower lower move wiggle 0 0 ${AMP} ${PER}

# Upper Wall particles
group		upper type 3
set			type 3 diameter 3 # changed to large because SRD particles slipping through. Wall is a nontrival option as it can't move outside of sinusoidal
# fix 		allow_upper_movement upper move linear 0.0 0.0 NULL # NULL allows group to have velocity as integrated by the force on it
# fix			force_upper_movement upper aveforce 0.0 0.0 -${pressure_phase1}
fix 		allow_upper_movement upper nve/sphere

# Middle particles that can flow
group		flow type 1
fix 		allow_flow_movement flow nve/sphere

# SRD Particles
## Create the particles in a box
variable     	density_srd equal 100  # number density
variable     	vol equal 10
region        	box block $(xlo) $(xhi) $(ylo) $(yhi) $(zlo) $(zhi)
# region        	box block .8 2 .8 2 .8 2
create_atoms  	4 random $(v_density_srd*v_vol) 1 box # create_atoms type random N_to_create seed region_ID
set				type 4 mass 0.001
set				type 4 diameter 0.001
## Group them all together and allow movmement, velocity, and SRD to theg roup
group      		srd_particles type 4
fix 			allow_srd_movement srd_particles nve/sphere
velocity		srd_particles create 1 593849 loop geom # Create [temp seed]
fix	        	enable_srd srd_particles srd 20 flow 1 0.2 1 overlap yes cubic warn .5 lamda .6 inside warn

# Box enviroment
# fix         containing_wall all wall/reflect zlo 0 zhi 5.6 # Prevents particles from flying off to infinity

# define walls for dem particles to interact with
delete_atoms group upper
# variable        topwall_velocity equal -.1
variable        topwall_velocity equal -${AMP}*${FREQ}*sin(${FREQ}*${time})
region          top_wall plane 0 0 5.5 0 0 1 move NULL NULL v_topwall_velocity
fix             move_top_wall all wall/gran/region hooke/history ${kn} ${kt} ${gamma_n} ${gamma_t} ${xmu} ${dampflag} region top_wall
# variable        wallpos equal ${AMP}*cos(${FREQ}*${time})
# fix             move_top_wall all wall/gran/region hooke/history ${kn} ${kt} ${gamma_n} ${gamma_t} ${xmu} ${dampflag} zplane 0 ${wallpos}


# define walls for srd particles to interact with
# fix		        srdwall all wall/srd zhi v_topwall_velocity
###############################################
# Adjust tracking of neighbors for computational ease
###############################################
neigh_modify	exclude type 2 2 # No measuring the interction between wall particles
neigh_modify	exclude type 3 3 # No measuring the interction between wall particles
neigh_modify	exclude type 2 3 # No measuring the interction between wall particles
neigh_modify 	exclude type 4 4
neigh_modify	one 100000 # added because more SRD particles needed more bins for neighbors because there's so many
neigh_modify	page 10000000
###############################################
# COMPUTES
###############################################
compute 	mobile all erotate/sphere #Rotational KE of group of spherical particles, 1/2 Iw^2
compute 	t1 all temp/sphere #Rot AND Translational temp of group of sphere parts
compute 	1 flow group/group upper #Total energy and force interaction between flow and upper groups
compute 	2 upper group/group flow #Same as ^ but between opper and flow
compute 	myPress flow stress/atom NULL virial #Per-atom stress tensor for FLOW group
#compute 3 flow reduce ave c_myPress[*]
compute 	4 upper group/group flow # Total energy and force interaction between upper and flow
compute 	5 all temp

###############################################
# ON SCREEN INFORMATION
###############################################
fix extra all print 100  	"""
****************************************************************************
*** Current Simulation is Initial Conditions PHASE I with parameters:
*** ${friction_status}
*** Vibration Amplitude = ${AMP}
*** Time = ${time}
*** dt = ${dt}
*** kn = ${kn}
*** kt = ${kt}
*** gamma_n = ${gamma_n}
*** gamma_t = ${gamma_t}
*** top wall velocity = ${topwall_velocity}
****************************************************************************
"""

###############################################
# THERMODYNAMIC PARAMETERS
###############################################
thermo_style	custom step atoms ke vol
thermo			10000
thermo_modify 	temp t1
thermo_modify	lost ignore norm no
compute_modify	thermo_temp dynamic/dof yes

###############################################
# OUTPUTS
###############################################
dump movie_system all movie 10000 ./movies/movie.IC.${friction_status}.Pressure_${dimensionless_p}.mp4 type type zoom 1 size 1280 720
dump_modify movie_system adiam 4 .05 adiam 2 .1 adiam 3 .1
dump gif_system all movie 10000 ./movies/movie.IC.${friction_status}.Pressure_${dimensionless_p}.gif type type zoom 1 size 1280 720
dump_modify gif_system adiam 4 .05 adiam 2 .1 adiam 3 .1

###############################################
# RUN
##############################################
variable ke equal ke
fix long_ave all ave/time 10 100 1000 v_ke ave window 5 #100,200,300,400...1000. Output on step 10K will be average of values on steps 5K , 6K,..., 10K
fix short_ave all ave/time 10 100 1000 v_ke

run 1000000000 every 100 "variable topwall_velocity equal -${AMP}*${FREQ}*sin(${FREQ}*${time})"

# run 1000000000 every 100 "variable        wallpos equal ${AMP}*cos(${FREQ}*${time})"

label 		loop
variable 	Loop_Count loop 10000
run 		10000
variable diffke equal abs(f_long_ave-f_short_ave)
if "${diffke} <= 0.00000001" then "jump SELF break"
next Loop_Count
jump SELF loop
label break

unfix 		force_upper_movement
fix			new_force_upper_movement upper aveforce 0.0 0.0 -${pressure_phase1}
unfix 		extra
fix new_extra all print 10005  	"""
****************************************************************************
*** Current Simulation is Initial Conditions PHASE II with parameters:
*** ${friction_status}
*** Pressure = 10
*** Dimensionless Pressure = 0.1
*** Vibration Amplitude = ${AMP}
*** Time = ${time}
*** dt = ${dt}
*** kn = ${kn}
*** kt = ${kt}
*** gamma_n = ${gamma_n}
*** gamma_t = ${gamma_t}
****************************************************************************
"""
print "Increasing Pressure"

run 5000 post no
variable diffke equal abs(f_long_ave-f_short_ave)
fix halt_if_converged all halt 1000 v_diffke <= 0.00000000001
run 1000000000

print "ALL DONE"

###############################################
# RESTART OUTPUT
###############################################

write_restart ./restart.IC.${friction_status}.pressure_${dimensionless_p}.%

###############################################
# RECYCLING BIN
###############################################
# variable 	myTemp equal temp
# label 		loop
# variable 	Loop_Count loop 10000
# run 		10000
# if "${myTemp} < 100000000000000000000" then "jump SELF break"
# next Loop_Count
# jump SELF loop
# label break

# print 	"*****************"
# print 	"SWITCHING TO GUNS"
# print 	"*****************"
# fix 	8 all viscous 1 #this increases the viscous force of all atoms

# label	 loop2
# variable Loop_Count2 loop 10000
# run 	10000
# if "${myTemp} < 100000" then "jump SELF break2"
# next Loop_Count2
# jump SELF loop2
# label break2

# variable 	E equal 1000     #Young Modulus aka k constant:
# variable	coeffRes equal 0.2
# variable	EYoung equal $E
# variable 	Poisson equal 2.0/7.0 #v = Poissons ratio = "squishyness"
# variable	GShear equal ${EYoung}/(2*(1+${Poisson})) #G = Shear Modulus
# variable	reff equal 1
# variable    kt equal 4.0*${GShear}/(2-${Poisson})
# variable	a equal (-2.0*log(${e_n})/${PI})^2
# variable    gamma_t equal ${gamma_n}*0.5
